OpenVSP model (file version 5), 4 components.
Geometry view with OpenVSP parameter names; values to 6 digits, angles in degrees, lengths in the model's unit.
Overall bounding box: X_Min=0 X_Len=950 Y_Min=-894.946 Y_Len=1789.89 Z_Min=-13.2053 Z_Len=177.32

Wing "Main Wing"
  location (X Y Z) 0 0 0, rotation 0 0 0
  symmetric about XZ
  bounding box size 330 1789.89 26.4105
  totals: TotalSpan=1700 TotalProjectedSpan=1700 TotalChord=210 TotalArea=357000 TotalAR=8.09524
  root: chord 330, twist 0, airfoil file "NACA 0008"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 BaseThickChord=0.0800225 ThickChord=0.0800225
  sections:
    n  Span  Root_Chord  Tip_Chord  Area    Sweep  Sweep_Location  Dihedral  Twist  Twist_Location  tip airfoil
    1  850   330         90         178500  0      0.5             0         0      0.25            NACA 4-series Camber=0 CamberLoc=0.2 ThickChord=0.1
  SS_Control "SS_CONT_0": EtaStart=0.4 EtaEnd=0.9 Length_C_Start=0.35 Length_C_End=0.35 Length_Start=81.9 Length_End=39.9 LE_Flag=0 Surf_Type=2

Wing "Tail Wing"
  location (X Y Z) 810 0 25, rotation 0 0 0
  symmetric about XZ
  bounding box size 140 729.931 14.0043
  totals: TotalSpan=590 TotalProjectedSpan=590 TotalChord=140 TotalArea=82600 TotalAR=4.21429
  root: chord 140, twist 0, airfoil file ""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 BaseThickChord=1 ThickChord=0.1
  sections:
    n  Span  Root_Chord  Tip_Chord  Area   Sweep  Sweep_Location  Dihedral  Twist  Twist_Location  tip airfoil
    1  295   140         140        41300  0      0               0         0      0.25            NACA 4-series Camber=0 CamberLoc=0.2 ThickChord=0.1
  SS_Control "SS_CONT_0": EtaStart=0.2 EtaEnd=0.9 Length_C_Start=0.35 Length_C_End=0.35 Length_Start=49 Length_End=49 LE_Flag=0 Surf_Type=2

Wing "Vertical Wing Right"
  location (X Y Z) 810 285 25, rotation 90 0 0
  bounding box size 140 14.0043 139.115
  totals: TotalSpan=70 TotalProjectedSpan=70 TotalChord=140 TotalArea=9800 TotalAR=0.5
  root: chord 140, twist 0, airfoil file ""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 BaseThickChord=1 ThickChord=0.1
  sections:
    n  Span  Root_Chord  Tip_Chord  Area  Sweep  Sweep_Location  Dihedral  Twist  Twist_Location  tip airfoil
    1  70    140         140        9800  0      0               0         0      0.25            NACA 4-series Camber=0 CamberLoc=0.2 ThickChord=0.1
  SS_Control "SS_CONT_0": EtaStart=0.1 EtaEnd=1 Length_C_Start=0.35 Length_C_End=0.35 Length_Start=49 Length_End=49 LE_Flag=0 Surf_Type=2

Wing "Vertical Wing Left"
  location (X Y Z) 810 -285 25, rotation 90 0 0
  bounding box size 140 14.0043 139.115
  totals: TotalSpan=70 TotalProjectedSpan=70 TotalChord=140 TotalArea=9800 TotalAR=0.5
  root: chord 140, twist 0, airfoil file ""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 BaseThickChord=1 ThickChord=0.1
  sections:
    n  Span  Root_Chord  Tip_Chord  Area  Sweep  Sweep_Location  Dihedral  Twist  Twist_Location  tip airfoil
    1  70    140         140        9800  0      0               0         0      0.25            NACA 4-series Camber=0 CamberLoc=0.2 ThickChord=0.1
  SS_Control "SS_CONT_0": EtaStart=0.1 EtaEnd=1 Length_C_Start=0.35 Length_C_End=0.35 Length_Start=49 Length_End=49 LE_Flag=0 Surf_Type=2
