OpenVSP model (file version 5), 4 components.
Geometry view with OpenVSP parameter names; values to 6 digits, angles in degrees, lengths in the model's unit.
Overall bounding box: X_Min=0.0419511 X_Len=1310.31 Y_Min=-896.575 Y_Len=1793.15 Z_Min=-9.59895 Z_Len=220.862

Wing "Main Wing"
  location (X Y Z) 0 0 0, rotation 0 0 0
  symmetric about XZ
  bounding box size 473.642 1793.15 115.769
  mass: Density=5.88e-05 Shell_Flag=0 Mass_Area=1 Mass_Prior=0
  totals: TotalSpan=1800 TotalProjectedSpan=1793.15 TotalChord=378.947 TotalArea=682105 TotalAR=4.71392
  root: chord 473.684, twist 0, airfoil file "E216  (10.4%)"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 BaseThickChord=0.104054 ThickChord=0.104054
  sections:
    n  Span  Root_Chord  Tip_Chord  Area    Sweep  Sweep_Location  Dihedral  Twist  Twist_Location  tip airfoil
    1  900   473.684     284.211    341053  0      0               5         0      0.25            as above
  SS_Control "Flaps1": EtaStart=0.182 EtaEnd=0.335 Length_C_Start=0.35 Length_C_End=0.35 Length_Start=153.673 Length_End=143.53 LE_Flag=0 Surf_Type=2
  SS_Control "Flaps2": EtaStart=0.402 EtaEnd=0.628 Length_C_Start=0.35 Length_C_End=0.35 Length_Start=139.088 Length_End=124.105 LE_Flag=0 Surf_Type=2

Wing "Tail Wing"
  location (X Y Z) 1104.27 0 0, rotation 0 0 0
  symmetric about XZ
  bounding box size 206.081 906.789 16.4931
  mass: Density=5.88e-05 Shell_Flag=0 Mass_Area=1 Mass_Prior=0
  totals: TotalSpan=824.324 TotalProjectedSpan=824.324 TotalChord=206.081 TotalArea=169877 TotalAR=4
  root: chord 206.081, twist 0, airfoil file "NACA 0008"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 BaseThickChord=0.0800225 ThickChord=0.0800225
  sections:
    n  Span     Root_Chord  Tip_Chord  Area     Sweep  Sweep_Location  Dihedral  Twist  Twist_Location  tip airfoil
    1  412.162  206.081     206.081    84938.7  0      0               0         0      0.25            as above

Wing "Vertical Wing Right"
  location (X Y Z) 1104.27 290 0, rotation 90 0 0
  bounding box size 206.081 18.5934 211.263
  mass: Density=5.88e-05 Shell_Flag=0 Mass_Area=1 Mass_Prior=0
  totals: TotalSpan=184.584 TotalProjectedSpan=184.584 TotalChord=164.865 TotalArea=30431.4 TotalAR=1.11961
  root: chord 206.081, twist 0, airfoil file "NACA-0009 9.0% smoothed"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 BaseThickChord=0.0902155 ThickChord=0.0902155
  sections:
    n  Span     Root_Chord  Tip_Chord  Area     Sweep  Sweep_Location  Dihedral  Twist  Twist_Location  tip airfoil
    1  184.584  206.081     123.649    30431.4  0      0.99            0         0      0.25            as above

Wing "Vertical Wing Left"
  location (X Y Z) 1104.27 -290 0, rotation 90 0 0
  bounding box size 206.081 18.5934 211.263
  mass: Density=5.88e-05 Shell_Flag=0 Mass_Area=1 Mass_Prior=0
  totals: TotalSpan=184.584 TotalProjectedSpan=184.584 TotalChord=164.865 TotalArea=30431.4 TotalAR=1.11961
  root: chord 206.081, twist 0, airfoil file "NACA-0009 9.0% smoothed"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 BaseThickChord=0.0902155 ThickChord=0.0902155
  sections:
    n  Span     Root_Chord  Tip_Chord  Area     Sweep  Sweep_Location  Dihedral  Twist  Twist_Location  tip airfoil
    1  184.584  206.081     123.649    30431.4  0      0.99            0         0      0.25            as above
